*Heading
 Thermal and mechanical analysis
** Job name: ThermalAnalysis Model name: Model-1
** Generated by: Abaqus/CAE Learning Edition 2024
*Preprint, echo=NO, model=NO, history=NO, contact=NO
**
** PARTS
**
*Part, name=Cu
*Node
      1,           0.,           0.
      2,        16.25,           0.
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*Element, type=CAX3T
1, 85, 79, 78
2, 66, 60, 61
*Element, type=CAX4T
 3, 62, 63, 64, 65
 4, 65, 66, 61, 62
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*Nset, nset=ContactLineCu
  2,  3,  4,  5,  6,  7
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*Elset, elset=ContactLineCu
 13, 17, 21, 26, 37, 38
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*Nset, nset=AllSurfaceCu, generate
  1,  87,   1
*Elset, elset=AllSurfaceCu, generate
  1,  65,   1
*Nset, nset=CenterLineCu
  1, 15, 24, 25, 26, 27
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*Elset, elset=CenterLineCu
  6,  7, 10, 11, 12, 14
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** Section: Via
*Solid Section, elset=AllSurfaceCu, material=Cu
,
*End Part
**
*Part, name=Si
*Node
      1,         100.,           0.
      2,        16.25,           0.
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*Element, type=CAX3T
1,  78,  27,  26
2, 167, 122,  79
3, 260, 249, 229
4, 299, 287, 284
5, 290, 291, 283
*Element, type=CAX4T
  6,  20,  19,  73, 126
  7,  33,  84,  85,  34
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*Nset, nset=ContactLineSi
  2,  4,  5,  6,  7,  8
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*Elset, elset=ContactLineSi
 11, 12, 13, 14, 41, 42
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*Nset, nset=AllSurfaceSi, generate
   1,  300,    1
*Elset, elset=AllSurfaceSi, generate
   1,  270,    1
*Nset, nset=LateralLineSi
  1,  3, 26, 27, 28, 29
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*Elset, elset=LateralLineSi
  1,  7,  8, 15, 16, 27
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** Section: wafer
*Solid Section, elset=AllSurfaceSi, material=Si
,
*End Part
**
**
** ASSEMBLY
**
*Assembly, name=Assembly
**
*Instance, name=Cu, part=Cu
*End Instance
**
*Instance, name=Si, part=Si
*End Instance
**
*Surface, type=NODE, name=Cu_ContactLineCu_CNS_, internal
Cu.ContactLineCu, 1.
*Surface, type=NODE, name=Si_ContactLineSi_CNS_, internal
Si.ContactLineSi, 1.
** Constraint: CuSiTie
*Tie, name=CuSiTie, adjust=yes
Si_ContactLineSi_CNS_, Cu_ContactLineCu_CNS_
*End Assembly
*Amplitude, name=ThermalCycle, time=TOTAL TIME
             0.,             25.,           1.833,            300.,           2.833,            300.,           4.433,            -65.
          5.433,            -65.,              7.,             25.,           8.833,            300.,           9.833,            300.
         11.433,            -65.,          12.433,            -65.,             14.,             25.,          15.833,            300.
         16.833,            300.,          18.433,            -65.,          19.433,            -65.,             21.,             25.
         22.833,            300.,          23.833,            300.,          25.433,            -65.,          26.433,            -65.
            28.,             25.,          29.833,            300.,          30.833,            300.,          32.433,            -65.
         33.433,            -65.,             35.,             25.,          36.833,            300.,          37.833,            300.
         39.433,            -65.,          40.433,            -65.,             42.,             25.,          43.833,            300.
         44.833,            300.,          46.433,            -65.,          47.433,            -65.,             49.,             25.
         50.833,            300.,          51.833,            300.,          53.433,            -65.,          54.433,            -65.
            56.,             25.,          57.833,            300.,          58.833,            300.,          60.433,            -65.
         61.433,            -65.,             63.,             25.,          64.833,            300.,          65.833,            300.
         67.433,            -65.,          68.433,            -65.,             70.,             25.,          71.833,            300.
         72.833,            300.,          74.433,            -65.,          75.433,            -65.,             77.,             25.
         78.833,            300.,          79.833,            300.,          81.433,            -65.,          82.433,            -65.
            84.,             25.,          85.833,            300.,          86.833,            300.,          88.433,            -65.
         89.433,            -65.,             91.,             25.,          92.833,            300.,          93.833,            300.
         95.433,            -65.,          96.433,            -65.,             98.,             25.,          99.833,            300.
        100.833,            300.,         102.433,            -65.,         103.433,            -65.,            105.,             25.
**
** MATERIALS
**
*Material, name=Cu
*Conductivity
 0.401,
*Damage Initiation, criterion=DUCTILE
 0.15, 0.1,  0.
*Damage Evolution, type=DISPLACEMENT
 0.1,
*Density
 8.96e-12,
*Elastic
120000., 0.34
*Expansion
 1.785e-05,
*Plastic
    150.,         0.
 159.666, 0.00100503
 161.785, 0.00201005
 163.234, 0.00301508
 164.369,  0.0040201
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 193.924,        0.2
*Specific Heat
 0.00039,
*Material, name=Si
*Conductivity
 0.149,
*Density
 2.33e-12,
*Elastic
130000., 0.28
*Expansion
 2.87e-06,
*Specific Heat
 0.0007,
**
** BOUNDARY CONDITIONS
**
** Name: FixedCuCenter Type: Displacement/Rotation
*Boundary, fixed
Cu.CenterLineCu, 1, 1
Cu.CenterLineCu, 3, 3
** Name: FixedSiLateral Type: Displacement/Rotation
*Boundary, fixed
Si.LateralLineSi, 1, 1
Si.LateralLineSi, 2, 2
Si.LateralLineSi, 3, 3
** ----------------------------------------------------------------
**
** STEP: TCTCondition
**
*Step, name=TCTCondition, nlgeom=NO, inc=100000
*Coupled Temperature-displacement, creep=none, deltmx=1.
0.1, 105., 1e-05, 1.
**
** BOUNDARY CONDITIONS
**
** Name: CuTempBC Type: Temperature
*Boundary, amplitude=ThermalCycle
Cu.AllSurfaceCu, 11, 11, 1.
** Name: SiTempBC Type: Temperature
*Boundary, amplitude=ThermalCycle
Si.AllSurfaceSi, 11, 11, 1.
**
** OUTPUT REQUESTS
**
*Restart, write, frequency=0
**
** FIELD OUTPUT: F-Output-1
**
*Output, field, variable=PRESELECT
**
** HISTORY OUTPUT: H-Output-1
**
*Output, history, variable=PRESELECT
*End Step
